// SBML level 3 version 1

function MM(km, Vmax, S)
  Vmax*S/(km + S);
end

function MMWithKcat(km, kcat, S, E)
  kcat*E*S/(km + S);
end

function NonCompetitiveInhibition(km, ki, Vmax, n, I, S)
  Vmax*S/((km + S)*(1 + (I/ki)^n));
end

function NonCompetitiveInhibitionWithKcat(km, ki, kcat, E, n, I, S)
  kcat*E*S/((km + S)*(1 + (I/ki)^n));
end

function NonCompetitiveInhibitionWithKcatAndExtraActivator(km, ki, kcat, E1, E2, n, I, S)
  kcat*E1*E2*S/((km + S)*(1 + (I/ki)^n));
end

function MA1(k, S)
  k*S;
end

function MA2(k, S1, S2)
  k*S1*S2;
end

function MA1Mod(k, S, M)
  k*S*M;
end

function MA2Mod(k, S1, S2, M)
  k*S1*S2*M;
end

function CompetitiveInhibitionWithKcat(km, ki, kcat, E, I, S)
  kcat*E*S/(km + S + km*I/ki);
end

function CompetitiveInhibition(Vmax, km, ki, I, S)
  Vmax*S/(km + S + km*I/ki);
end

function Hill(km, kcat, E, S, h)
  kcat*E*(S/km)^h/(1 + (S/km)^h);
end

model ModelWithMTOR()

  // Compartments:
  compartment default_compartment = 1;
  compartment Cell = 1;

  // Species:
  species IRS1 in Cell = 10;
  species IRS1_a in Cell = -7.27511e-25;
  species pIRS1 in Cell = 1.33065e-24;
  species Akt in Cell = 10.005;
  species pAkt in Cell = -5.983678e-24;
  species TSC2 in Cell = 10.005;
  species pTSC2 in Cell = 0;
  species RhebGDP in Cell = 90.91324;
  species RhebGTP in Cell = 9.08678;
  species Pras40 in Cell = 8.659322e-9;
  species mTORC1_Pras40_Lys in Cell = 5.012501;
  species mTORC1_Pras40_Cyt in Cell = 5.012501;
  species pmTORC1 in Cell = 8.659322e-9;
  species mTORC1_i in Cell = -4.470501e-16;
  species mTORC1_ii in Cell = 1.100317e-25;
  species mTORC1_iii in Cell = -1.621359e-24;
  species S6K in Cell = 10.005;
  species pS6K in Cell = 1.575138e-8;
  species FourEBP1 in Cell = 10.005;
  species pFourEBP1 in Cell = 2.886921e-7;
  species $Rapamycin in default_compartment = 0;
  species ppPras40 in default_compartment = -2.706287e-22;

  // Parameters:
  Insulin = 0;
  kIRS1In = 1;
  kIRS1Out = 0.1;
  kIRS1Act_km = 1;
  kIRS1Act_kcat = 10;
  kIRS1Act_h = 2;
  kIRS1Act = 0.1;
  kIRS1Inact = 0.1;
  kIRS1Phos = 0.5;
  kIRS1Dephos = 0.1;
  kAktPhos = 0.1;
  kAktDephos = 0.1;
  kTSC2Phos = 0.1;
  kTSC2Dephos = 0.1;
  kmTORC1ToLys = 0.1;
  kmTORC1ToCyt = 0.1;
  kmTORC1Act = 0.1;
  kmTORC1Dephos = 1;
  kmTORC1BindRapa = 2;
  kmTORC1UnbindRapa = 0.1;
  kS6KPhos_km = 100;
  kS6KPhos_kcat = 2;
  kS6KDephos = 0.1;
  k4Phos_km = 5;
  k4EBP1Phos_kcat = 5;
  k4EBP1Dephos = 0.1;
  kRhebPhos = 0.1;
  kRhebDephos = 0.1;
  kRhebIn = 10;
  kRhebOut = 0.1;
  kmTORC1BindPras40 = 0.1;
  kPras40Dephos = 0.1;
  AA = 1;

  // Reactions:
  R1In: => IRS1; Cell*kIRS1In;
  R2Out: IRS1 => ; Cell*kIRS1Out*IRS1;
  R1f: IRS1 => IRS1_a; Cell*kIRS1Act*IRS1*Insulin;
  R1b: IRS1_a => IRS1; Cell*kIRS1Inact*IRS1_a;
  R1i: IRS1_a => pIRS1; Cell*kIRS1Phos*IRS1_a*pS6K;  // modifiers: pS6K
  R1o: pIRS1 => ; Cell*kIRS1Dephos*pIRS1;
  R2f: Akt => pAkt; Cell*kAktPhos*Akt*IRS1_a;  // modifiers: IRS1_a
  R2b: pAkt => Akt; Cell*kAktDephos*pAkt;
  R3f: TSC2 => pTSC2; Cell*kTSC2Phos*TSC2*pAkt;  // modifiers: pAkt
  R3b: pTSC2 => TSC2; Cell*kTSC2Dephos*pTSC2;
  R4Out: RhebGDP => ; Cell*kRhebOut*RhebGDP;
  R4In: => RhebGTP; Cell*kRhebIn;
  R4Out2: RhebGTP => ; Cell*kRhebOut*RhebGTP;
  R4f: RhebGDP => RhebGTP; Cell*kRhebPhos*RhebGDP*AA;
  R4b: RhebGTP => RhebGDP; Cell*kRhebDephos*RhebGTP*TSC2;  // modifiers: TSC2
  R5f: mTORC1_Pras40_Cyt => mTORC1_Pras40_Lys; Cell*kmTORC1ToLys*mTORC1_Pras40_Cyt*AA;
  R5b: mTORC1_Pras40_Lys => mTORC1_Pras40_Cyt; Cell*kmTORC1ToCyt*mTORC1_Pras40_Lys;
  R6f: mTORC1_Pras40_Lys + RhebGTP => pmTORC1 + ppPras40 + RhebGDP; Cell*kmTORC1Act*pAkt*RhebGTP*mTORC1_Pras40_Lys;  // modifiers: pAkt
  R6b: pmTORC1 + Pras40 => mTORC1_Pras40_Lys; Cell*kmTORC1BindPras40*pmTORC1*Pras40;
  R6c: ppPras40 => Pras40; Cell*kPras40Dephos*ppPras40;
  R7if: mTORC1_Pras40_Cyt + $Rapamycin => mTORC1_i; Cell*kmTORC1BindRapa*mTORC1_Pras40_Cyt*Rapamycin;
  R7ib: mTORC1_i => mTORC1_Pras40_Cyt + $Rapamycin; Cell*kmTORC1UnbindRapa*mTORC1_i;
  R8iif: mTORC1_Pras40_Lys + $Rapamycin => mTORC1_ii; Cell*kmTORC1BindRapa*mTORC1_Pras40_Lys*Rapamycin;
  R8iib: mTORC1_ii => mTORC1_Pras40_Lys + $Rapamycin; Cell*kmTORC1UnbindRapa*mTORC1_ii;
  R9iiif: pmTORC1 + $Rapamycin => mTORC1_iii; Cell*kmTORC1BindRapa*pmTORC1*Rapamycin;
  R9iiib: mTORC1_iii => pmTORC1 + $Rapamycin; Cell*kmTORC1UnbindRapa*mTORC1_iii;
  R10f: S6K => pS6K; Cell*MMWithKcat(kS6KPhos_km, kS6KPhos_kcat, S6K, pmTORC1);  // modifiers: pmTORC1
  R10b: pS6K => S6K; Cell*kS6KDephos*pS6K;
  R11f: FourEBP1 => pFourEBP1; Cell*MMWithKcat(k4Phos_km, k4EBP1Phos_kcat, FourEBP1, pmTORC1);  // modifiers: pmTORC1
  R11b: pFourEBP1 => FourEBP1; Cell*k4EBP1Dephos*pFourEBP1;
end
