// SBML level 3 version 1

function MM(km, Vmax, S)
  Vmax*S/(km + S);
end

function MMWithKcat(km, kcat, S, E)
  kcat*E*S/(km + S);
end

function NonCompetitiveInhibition(km, ki, Vmax, n, I, S)
  Vmax*S/((km + S)*(1 + (I/ki)^n));
end

function NonCompetitiveInhibitionWithKcat(km, ki, kcat, E, n, I, S)
  kcat*E*S/((km + S)*(1 + (I/ki)^n));
end

function NonCompetitiveInhibitionWithKcatAndExtraActivator(km, ki, kcat, E1, E2, n, I, S)
  kcat*E1*E2*S/((km + S)*(1 + (I/ki)^n));
end

function MA1(k, S)
  k*S;
end

function MA2(k, S1, S2)
  k*S1*S2;
end

function MA1Mod(k, S, M)
  k*S*M;
end

function MA2Mod(k, S1, S2, M)
  k*S1*S2*M;
end

function CompetitiveInhibitionWithKcat(km, ki, kcat, E, I, S)
  kcat*E*S/(km + S + km*I/ki);
end

function CompetitiveInhibition(Vmax, km, ki, I, S)
  Vmax*S/(km + S + km*I/ki);
end

function Hill(km, kcat, L, S, h)
  kcat*L*(S/km)^h/1 + (S/km)^h;
end

model SimpleAktModel()

  // Compartments:
  compartment Cell = 1;

  // Species:
  species $IRS1 in Cell;
  species IRS1pS636_639 in Cell = 0.458843;
  species $Akt in Cell;
  species AktpT308 in Cell = 0.585251;
  species $TSC2 in Cell;
  species TSC2pT1462 in Cell = 0.654499;
  species $PRAS40 in Cell;
  species PRAS40pT246 in Cell = 0.537742;
  species $S6K in Cell;
  species S6KpT389 in Cell = 0.177316;
  species S6KpT229 in Cell = 0.241475;
  species $FourEBP1 in Cell;
  species FourEBP1pT37_46 in Cell = 0.644677;
  species $PI3K in Cell;
  species pPI3K in Cell = 0.1;

  // Parameters:
  Insulin = 1;
  offset_amount = 0;
  _kAktPhos_km = 0.1;
  _kAktPhos_kcat = 0.1;
  _kAktDephos = 0.1;
  _kS6KT389Phos_km = 0.1;
  _kS6KT389Phos_kcat = 0.1;
  _kS6KT389Dephos = 0.1;
  _kTSC2Phos_km = 0.1;
  _kTSC2Phos_kcat = 0.1;
  _kTSC2Dephos = 0.1;
  _kIRS1Phos_km = 0.1;
  _kIRS1Phos_kcat = 0.1;
  _kIRS1Dephos_km = 0.1;
  _kIRS1Dephos_kcat = 0.1;
  _kPI3KPhos_km = 0.1;
  _kPI3KPhos_kcat = 0.1;
  _kPI3KDephos = 0.1;
  _kS6KPhosS229_km = 0.1;
  _kS6KPhosS229_kcat = 0.1;
  kS6KDephosS229 = 1;
  _kPras40PhosByAkt_km = 0.1;
  _kPras40PhosByAkt_kcat = 0.1;
  kPras40Dephos = 1;
  _kFourEBP1Phos_km = 0.1;
  _kFourEBP1Phos_kcat = 0.1;
  kFourEBP1Dephos = 1;
  IRS1a = ;

  // Assignment rules:
  IRS1 := IRS1_tot - IRS1pS636_639;
  Akt := Akt_tot - AktpT308;
  TSC2 := TSC2_tot - TSC2pT1462;
  PRAS40 := PRAS40_tot - PRAS40pT246;
  S6K := S6K_tot - S6KpT389 - S6KpT229;
  FourEBP1 := FourEBP1_tot - FourEBP1pT37_46;
  PI3K := PI3K_tot - pPI3K;
  FourEBP1_tot := 1.593687 + offset_amount;
  Akt_tot := 0.736138 + offset_amount;
  IRS1_tot := 0.458843 + offset_amount;
  TSC2_tot := 0.816176 + offset_amount;
  PRAS40_tot := 0.954775 + offset_amount;
  S6K_tot := 0.487419 + offset_amount;
  PI3K_tot := 1 + offset_amount;
  IRS1pS636_639_obs := IRS1pS636_639;
  AktpT308_obs := AktpT308;
  TSC2pT1462_obs := TSC2pT1462;
  PRAS40pT246_obs := PRAS40pT246;
  S6KpT389_obs := S6KpT389;
  S6KpT229_obs := S6KpT229;
  FourEBP1pT37_46_obs := FourEBP1pT37_46;

  // Reactions:
  R1f: $IRS1 => IRS1pS636_639; Cell*MMWithKcat(_kIRS1Phos_km, _kIRS1Phos_kcat, IRS1, S6KpT389);  // modifiers: S6KpT389
  R1b: IRS1pS636_639 => $IRS1; Cell*MMWithKcat(_kIRS1Dephos_km, _kIRS1Dephos_kcat, IRS1pS636_639, Insulin);
  R2f: $PI3K => pPI3K; Cell*MMWithKcat(_kPI3KPhos_km, _kPI3KPhos_kcat, PI3K, IRS1);  // modifiers: IRS1
  R2b: pPI3K => $PI3K; Cell*_kPI3KDephos*pPI3K;
  R3f: $S6K => S6KpT229; Cell*MMWithKcat(_kS6KPhosS229_km, _kS6KPhosS229_kcat, S6K, pPI3K);  // modifiers: pPI3K
  R3b: S6KpT229 => $S6K; Cell*kS6KDephosS229*S6KpT229;
  R4f: $Akt => AktpT308; Cell*MMWithKcat(_kAktPhos_km, _kAktPhos_kcat, Akt, pPI3K);  // modifiers: pPI3K
  R4b: AktpT308 => $Akt; Cell*_kAktDephos*AktpT308;
  R5f: $TSC2 => TSC2pT1462; Cell*MMWithKcat(_kTSC2Phos_km, _kTSC2Phos_kcat, TSC2, AktpT308);  // modifiers: AktpT308
  R5b: TSC2pT1462 => $TSC2; Cell*_kTSC2Dephos*TSC2pT1462;
  R6f: $PRAS40 => PRAS40pT246; Cell*MMWithKcat(_kPras40PhosByAkt_km, _kPras40PhosByAkt_kcat, PRAS40, AktpT308);  // modifiers: AktpT308
  R6b: PRAS40pT246 => $PRAS40; Cell*kPras40Dephos*PRAS40pT246;
  R7f: $FourEBP1 => FourEBP1pT37_46; Cell*MMWithKcat(_kFourEBP1Phos_km, _kFourEBP1Phos_kcat, FourEBP1, TSC2pT1462);  // modifiers: TSC2pT1462
  R7b: FourEBP1pT37_46 => $FourEBP1; Cell*kFourEBP1Dephos*FourEBP1pT37_46;
  R8f: $S6K => S6KpT389; Cell*MMWithKcat(_kS6KT389Phos_km, _kS6KT389Phos_kcat, S6K, TSC2pT1462);  // modifiers: TSC2pT1462
  R8b: S6KpT389 => $S6K; Cell*_kS6KT389Dephos*S6KpT389;
end
